*Heading
** Job name: Job-1 Model name: Model-1
** Generated by: Abaqus/CAE 2020
*Preprint, echo=NO, model=NO, history=NO, contact=NO
**
** PARTS
**
*Part, name=Part-1
*Node
      1,           0.,           0.,           0.
      2,           0.,           1.,           0.
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*Element, type=C3D8
    1,   1282,   1283,   1304,   1303,      1,      2,     23,     22
    2,   1283,   1284,   1305,   1304,      2,      3,     24,     23
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*Elset, elset=vs
61
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*Elset, elset=Non_Design
1
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** Section: sldSec
*Solid Section, elset=ss, material=Material01
,
** Section: voidSec
*Solid Section, elset=vs, material=Material00
,
*End Part
**
**
** ASSEMBLY
**
*Assembly, name=Assembly
**
*Instance, name=Part-1-1, part=Part-1
*End Instance
**
*Elset, elset=Set-2, instance=Part-1-1, generate
 92401,  96000,      1
*Nset, nset=Set-3, instance=Part-1-1
    1,    2,    3,    4,    5,    6
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*Elset, elset=Set-3, instance=Part-1-1
    1,    2,    3,    4,    5,    6
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*Elset, elset=_Surf-1_S1, internal, instance=Part-1-1, generate
 94801,  96000,      1
*Surface, type=ELEMENT, name=Surf-1
_Surf-1_S1, S1
*End Assembly
**
** MATERIALS
**
*Material, name=Material00
*Density
0.,
*Elastic
 1e-09, 0.3
*Material, name=Material01
*Density
78.,
*Elastic
1., 0.3
** ----------------------------------------------------------------
**
** STEP: Step-1
**
*Step, name=Step-1, nlgeom=NO
*Static
1., 1., 1e-05, 1.
**
** BOUNDARY CONDITIONS
**
** Name: BC-1 Type: Displacement/Rotation
*Boundary
Set-3, 1, 1
Set-3, 2, 2
Set-3, 3, 3
Set-3, 4, 4
Set-3, 5, 5
Set-3, 6, 6
**
** LOADS
**
** Name: Load-1   Type: Pressure
*Dsload
Surf-1, P, 1.
**
** OUTPUT REQUESTS
**
*Restart, write, frequency=0
**
** FIELD OUTPUT: SEDensity
**
*Output, field
*Node Output
U,
*Element Output, directions=YES
ELEDEN, EVOL, S
**
** FIELD OUTPUT: F-Output-1
**
*Output, field, variable=PRESELECT
**
** HISTORY OUTPUT: ExtWork
**
*Output, history
*Energy Output
ALLWK,
**
** HISTORY OUTPUT: H-Output-1
**
*Output, history, variable=PRESELECT
*End Step
